*Heading
** Job name: Job-Viscoelastic Model name: Model-1
*Preprint, echo=NO, model=NO, history=NO, contact=NO
**
** PARTS
**
*Part, name=Part-1
*Node
      1, 0.0507999994, 0.0507999994, 0.0190500002
      2, 0.0507999994,           0., 0.0190500002
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*Element, type=C3D8T
   1,  138,  493, 1804,  379,    1,   13,  265,   56
   2,  493,  494, 1805, 1804,   13,   14,  266,  265
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*Nset, nset=Set-1, generate
    1,  3969,     1
*Elset, elset=Set-1, generate
    1,  3200,     1
*Orientation, name=Ori-1
1., 0., 0., 0., 1., 0.
3, 90.
** Region: (Section-1:Set-1), (Material Orientation:Picked)
*Elset, elset=_I1, internal, generate
    1,  1600,     1
** Section: Section-1
*Solid Section, elset=_I1, orientation=Ori-1, material=Material-1
,
*Orientation, name=Ori-2
1., 0., 0., 0., 1., 0.
1, 0.
** Region: (Section-1:Set-1), (Material Orientation:Picked)
*Elset, elset=_I2, internal, generate
 1601,  3200,     1
** Section: Section-1
*Solid Section, elset=_I2, orientation=Ori-2, material=Material-1
,
*End Part
**
**
** ASSEMBLY
**
*Assembly, name=Assembly
**
*Instance, name=Part-1-1, part=Part-1
*End Instance
**
*Nset, nset=Set-1, instance=Part-1-1, generate
    1,  3969,     1
*Elset, elset=Set-1, instance=Part-1-1, generate
    1,  3200,     1
*Nset, nset=Set-2, instance=Part-1-1
    1,    2,    3,    4,    7,    8
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*Elset, elset=Set-2, instance=Part-1-1
    1,    2,    3,    4,    5,    6
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*Nset, nset=Set-3, instance=Part-1-1
    9,   10,   11,   12,  180,  181
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*Elset, elset=Set-3, instance=Part-1-1
 1661, 1662, 1663, 1664, 1665, 1666
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*Nset, nset=Set-4, instance=Part-1-1
    2,    3,    5,    6,    9,   11
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*Elset, elset=Set-4, instance=Part-1-1, generate
   20,  3200,    20
*Nset, nset=Set-5, instance=Part-1-1
    5,    6,    7,    8,    9,   10
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*Elset, elset=Set-5, instance=Part-1-1, generate
 1521,  1680,     1
*Nset, nset=Set-6m, instance=Part-1-1
 3,
*Nset, nset=Set-8, instance=Part-1-1
 7,
*Nset, nset=Set-9, instance=Part-1-1
    3,    4,    6,    7,   35,   36
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*Elset, elset=Set-9, instance=Part-1-1
   61,   62,   63,   64,   65,   66
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*Elset, elset=_Surf-1_S1, internal, instance=Part-1-1, generate
 3121,  3200,     1
*Elset, elset=_Surf-1_S6, internal, instance=Part-1-1, generate
    1,  3181,    20
*Elset, elset=_Surf-1_S2, internal, instance=Part-1-1, generate
  1,  80,   1
*Surface, type=ELEMENT, name=Surf-1
_Surf-1_S1, S1
_Surf-1_S6, S6
_Surf-1_S2, S2
*Elset, elset=_Surf-2_S1, internal, instance=Part-1-1, generate
 3121,  3200,     1
*Elset, elset=_Surf-2_S6, internal, instance=Part-1-1, generate
    1,  3181,    20
*Elset, elset=_Surf-2_S2, internal, instance=Part-1-1, generate
  1,  80,   1
*Elset, elset=_Surf-2_S5, internal, instance=Part-1-1
 1661, 1662, 1663, 1664, 1665, 1666
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*Surface, type=ELEMENT, name=Surf-2
_Surf-2_S1, S1
_Surf-2_S6, S6
_Surf-2_S2, S2
_Surf-2_S5, S5
*End Assembly
**
** MATERIALS
**
*Material, name=Material-1
*Conductivity, type=ORTHO
 5.43, 0.4135, 0.4135
*Density, dependencies=1
1578., ,-1000.
1578., , 1000.
*Depvar
     71,
*Expansion, type=ORTHO, user
*Heat Generation
*Specific Heat
862.,
*User Defined Field
*User Material, constants=18
 29.2,    2920.,  182000.,  1.1e+07, 2.83e+08, 7.94e+09, 1.95e+11, 3.32e+12
 4.92e+14,    0.059,    0.066,    0.083,    0.112,    0.154,    0.262,    0.184
    0.049,    0.025
*Time Points, name=TimePoints-1
2400., 6000., 7248., 14448., 18096.
**
** BOUNDARY CONDITIONS
**
** Name: BC-3 Type: Symmetry/Antisymmetry/Encastre
*Boundary
Set-4, YSYMM
** Name: BC-4 Type: Symmetry/Antisymmetry/Encastre
*Boundary
Set-5, XSYMM
** Name: BC-5 Type: Symmetry/Antisymmetry/Encastre
*Boundary
Set-9, ZSYMM
**
** PREDEFINED FIELDS
**
** Name: Predefined Field-1   Type: Temperature
*Initial Conditions, type=TEMPERATURE
Set-1, 298.15
** ----------------------------------------------------------------
**
** STEP: Step-1
**
*Step, name=Step-1, nlgeom=NO, inc=100000000
*Coupled Temperature-displacement, creep=none, deltmx=50.
100., 20000., 5e-05, 200.
**
** BOUNDARY CONDITIONS
**
** Name: BC-1 Type: Temperature
*Boundary, user
Set-2, 11, 11, 1.
**
** OUTPUT REQUESTS
**
*Restart, write, frequency=0
**
** FIELD OUTPUT: F-Output-1
**
*Output, field
*Node Output
NT, U
*Element Output, directions=YES
E, EE, S, SDV, THE
**
** FIELD OUTPUT: F-Output-1-Copy
**
*Output, field, time points=TimePoints-1
*Node Output
NT, U
*Element Output, directions=YES
E, EE, S, SDV, THE
**
** HISTORY OUTPUT: H-Output-1
**
*Output, history, variable=PRESELECT
*End Step
